! Results!! execute command: "mkdir /data2/blast_project/ansys/results/<your name here>
! /data2/blast_project/ansys/results/<your name here>
! RESULTSFOLDER=<your name here>
/CWD,'/data2/blast_project/ansys/Katie/Mike 1um'
/FILNAME,Mike1um,0
RESUME
RESULTSFOLDER='Mike1um/'
PATH1='/data2/blast_project/'
PATH2='ansys/results/'
NUM_STEP=.003/TIMESTEP
/POST1
!!!!!!!!!!!!!!!!!! OUTPUT BRAIN NODE LOCATIONS
NODE_LOCATIONS_FILE='BRAIN_NODE_LOCATIONS'
! to select nodes use the nsel command
! in the form: nsel, <OPTION>, loc, <DIRECTION>, <START>, <STOP>
! or the form: nsel, <OPTION>, loc, <DIRECTION>, <SINGLE_LOCATION>
! <OPTION> = s to select from all nodes
! <OPTION> = r to reselect from current selection
! <DIRECTION> = x for radius
! <DIRECTION> = y for theta
! <START>, <STOP>, <SINGLE_LOCATION> are all values - for theta values use DEGREES
nsel,s,loc,x,0,0.085 ! Selects all nodes from radius 0 to 0.085
/OUTPUT,%PATH1%%PATH2%%RESULTSFOLDER%%NODE_LOCATIONS_FILE%,,,
! The following command lists all of the x, y, and z coordinates of ALL SELECTED nodes
NLIST,ALL, , ,XYZ,,,,
/OUTPUT
!
!!!!!!!!!!!!!!! OUTPUT PRESSURES
/POST1
nsel,s,loc,x,0,0.085 ! Selects all nodes from radius 0 to 0.085
esel,s,loc,x,0,0.085 ! Selects all elements from radius 0 to 0.085
*do, STEP_NO, 1, NUM_STEP
	SET,,, ,,, ,%step_no%
	/OUTPUT,%PATH1%%PATH2%%RESULTSFOLDER%B_P_%STEP_NO%,,,,
	PRNSOL,PRES
	/OUTPUT,%PATH1%%PATH2%%RESULTSFOLDER%B_S_%STEP_NO%,,,,
	PRNSOL, EPEL, PRIN
	/OUTPUT,%PATH1%%PATH2%%RESULTSFOLDER%B_A_%STEP_NO%,,,,
	PRNSOL, ACC, COMP
*enddo
/OUTPUT
!
!!!!!!!!!!!!!!!!!! OUTPUT INNER NODE LOCATIONS
NODE_LOCATIONS_FILE='INNER_NODE_LOCATIONS'
! to select nodes use the nsel command
! in the form: nsel, <OPTION>, loc, <DIRECTION>, <START>, <STOP>
! or the form: nsel, <OPTION>, loc, <DIRECTION>, <SINGLE_LOCATION>
! <OPTION> = s to select from all nodes
! <OPTION> = r to reselect from current selection
! <DIRECTION> = x for radius
! <DIRECTION> = y for theta
! <START>, <STOP>, <SINGLE_LOCATION> are all values - for theta values use DEGREES
nsel,s,loc,x,0.0951,0.1329 ! Selects all nodes from radius .951 to .133
/OUTPUT,%PATH1%%PATH2%%RESULTSFOLDER%%NODE_LOCATIONS_FILE%,,,
! The following command lists all of the x, y, and z coordinates of ALL SELECTED nodes
NLIST,ALL, , ,XYZ,,,,
/OUTPUT
!
!!!!!!!!!!!!!!! OUTPUT PRESSURES
/POST1
nsel,s,loc,x,0.0951,0.1329 ! Selects all nodes from radius .951 to .133
esel,s,loc,x,0.0951,0.1329 ! Selects all elements from radius .951 to .133
*do, STEP_NO, 1, NUM_STEP
	SET,,, ,,, ,%step_no%
	/OUTPUT,%PATH1%%PATH2%%RESULTSFOLDER%I_P_%STEP_NO%,,,,
	PRNSOL,PRES
	/OUTPUT,%PATH1%%PATH2%%RESULTSFOLDER%I_S_%STEP_NO%,,,,
	PRNSOL, EPEL, PRIN
	/OUTPUT,%PATH1%%PATH2%%RESULTSFOLDER%I_A_%STEP_NO%,,,,
	PRNSOL, ACC, COMP
*enddo
/OUTPUT
!!!!!!!!!!!!!!!!!! OUTPUT OUTER NODE LOCATIONS
NODE_LOCATIONS_FILE='OUTER_NODE_LOCATIONS'
! to select nodes use the nsel command
! in the form: nsel, <OPTION>, loc, <DIRECTION>, <START>, <STOP>
! or the form: nsel, <OPTION>, loc, <DIRECTION>, <SINGLE_LOCATION>
! <OPTION> = s to select from all nodes
! <OPTION> = r to reselect from current selection
! <DIRECTION> = x for radius
! <DIRECTION> = y for theta
! <START>, <STOP>, <SINGLE_LOCATION> are all values - for theta values use DEGREES
nsel,s,loc,x,0.153,0.16 ! Selects all nodes from radius .153 to .16
/OUTPUT,%PATH1%%PATH2%%RESULTSFOLDER%%NODE_LOCATIONS_FILE%,,,
! The following command lists all of the x, y, and z coordinates of ALL SELECTED nodes
NLIST,ALL, , ,XYZ,,,,
/OUTPUT
!
!!!!!!!!!!!!!!! OUTPUT PRESSURES
/POST1
nsel,s,loc,x,0.153,0.16 ! Selects all nodes from radius .153 to .16
esel,s,loc,x,0.153,0.16 ! Selects all elements from radius .153 to .16
*do, STEP_NO, 1, NUM_STEP
	SET,,, ,,, ,%step_no%
	/OUTPUT,%PATH1%%PATH2%%RESULTSFOLDER%O_P_%STEP_NO%,,,,
	PRNSOL,PRES
	/OUTPUT,%PATH1%%PATH2%%RESULTSFOLDER%O_S_%STEP_NO%,,,,
	PRNSOL, EPEL, PRIN
	/OUTPUT,%PATH1%%PATH2%%RESULTSFOLDER%O_A_%STEP_NO%,,,,
	PRNSOL, ACC, COMP
*enddo
/OUTPUT
